# OpenSim document version 40000
Model Ankle_Foot_Prosthesis:
  gravity: 0 -9.80665 0
  Ground
  BodySet:
    Body Platform: mass=1 [kg] inertia=(1 1 1 0 0 0) meshes=Prosthesis_Platform.stl
    Body FootBase: mass=0.585 mass_center=(0.04 -0.0335 0.0057) inertia=(0 0.0035 0.00057 0 0 0)
        meshes=(Prosthesis_Base1.stl Prosthesis_Base2.stl)
    Body FootUpper: mass=0.18 mass_center=(0 0 0) inertia=(0.0012 1 0.02 0 0 0) meshes=Prosthesis_Upper.stl
  JointSet:
    PinJoint JointPlatform: socket_parent_frame=ground_offset socket_child_frame=Platform_offset
      Coordinate Platform_rz: default_value=-0.03141593 range=(-0.296706 0.1658063)
      PhysicalOffsetFrame ground_offset: socket_parent=/ground translation=(0 0 0) [meters]
      PhysicalOffsetFrame Platform_offset: socket_parent=/bodyset/Platform translation=(0 0 0)
    PlanarJoint JointFootUpper: socket_parent_frame=/ground socket_child_frame=/bodyset/FootUpper
      Coordinate Foot_Upper_rz: default_value=0 range=(0 0) locked=true
      Coordinate Foot_Upper_tx: default_value=0 range=(-2 3) locked=true
      Coordinate Foot_Upper_ty: default_value=0.047 range=(0 1)
    PinJoint JointAnkle: socket_parent_frame=FootUpper_offset socket_child_frame=FootBase_offset
      Coordinate Ankle: default_value=-0.03141593 range=(-0.296706 0.1658063)
      PhysicalOffsetFrame FootUpper_offset: socket_parent=/bodyset/FootUpper translation=(0 0 0)
      PhysicalOffsetFrame FootBase_offset: socket_parent=/bodyset/FootBase translation=(0 0 0)
  ForceSet:
    ElasticFoundationForce EFFFootPlatform:
      ContactParametersSet contact_parameters:
        ContactParameters: geometry=(PlatformContact FootContact) stiffness=1000000 dissipation=2 static_friction=0.8
            dynamic_friction=0.8 viscous_friction=0.8
  ContactGeometrySet:
    ContactHalfSpace PlatformContact: socket_frame=/bodyset/Platform location=(0 0 0) orientation=(0 0 -1.570796)
    ContactMesh FootContact: socket_frame=/bodyset/FootBase location=(0 0 0) filename=Prosthesis_Base1.stl
